# mpirun -np 12 --oversubscribe ../lammps/build/lmp -in in.amine_polymers_sh
print "Starting in.amine_polymers"

# simulation format parameters
units lj    #  Lennard-Jones units, essentially unitless
dimension 3
boundary p p p
atom_style bond
log logs/log.amine_polymers

# variable N equal 300 # input from run.sh
# variable BOX_SIZE equal 40 # input from run.sh
# variable patch_bond_r0 equal 0.45 # input from run.sh
# variable patch_gauss_B_width equal 13.8504255125 # input from run.sh
# variable patch_gauss_A_strength equal 50 # strength of Gaussian attraction between amine patches # TODO: change back
# variable output_amine_file string logs/patch_n_${patch_gauss_A_strength}_${patch_bond_r0}.dat


# create simulation box
region box block 0 ${BOX_SIZE} 0 ${BOX_SIZE} 0 ${BOX_SIZE}
create_box 2 box bond/types 2 extra/bond/per/atom 4 extra/special/per/atom 20

# polymer molecule definition
mass 1 1.0 # backbone + dummy mass
mass 2 1.0 # patch mass
molecule polymer data/polymer.molecule

# bond potentials (harmonic)
bond_style harmonic
bond_coeff 1 50.0 1.0 # k, r0 # backbone stiffness
# k is derived from Raffaeilli and Ellenbroek, Soft Matter 2021
# "...polymer backbones have a stiffness of 50e/b^2..."
bond_coeff 2 5000 ${patch_bond_r0} # stiff spring on patches

# interatomic potentials (non-bonded)
pair_style hybrid/overlay lj/cut 1.4592006628 gauss 2.0 # cutoff for both at 2.0
pair_coeff 1 1 lj/cut 1.0 1.3  # WCA between backbone beads
pair_coeff 1 2 lj/cut 0.0 1.3  # WCA between backbone and amine patches
pair_coeff 2 2 lj/cut 0.0 1.3 # no WCA between amine patches
pair_modify shift yes # shift to zero at cutoff
pair_coeff 2 2 gauss ${patch_gauss_A_strength} ${patch_gauss_B_width} 2.0 # Gaussian attraction between amine patches

# create atoms
create_atoms 0 random $N 12345 box mol polymer 12345

# group definitions
group monomer type 1
group amine type 2

# for visualization in OVITO
write_data data/data.replicated_particles

# neighbor list settings
neighbor 0.3 bin
neigh_modify every 1 delay 0 check yes

# energy minimization to relax overlaps at beginning
min_style cg             # conjugate gradient (good default)
minimize 1.0e-6 1.0e-8 10000 100000
reset_timestep 0

# initial velocities for equilibration
timestep 0.005 # could be 0.001, Raffaeilli and Ellenbroek, Soft Matter 2021
velocity all create 1.0 1 # initial temperature 1.0, random seed 1
fix 1 all nvt temp 1.0 1.0 $(100.0*dt) # NVT ensemble, temp 1.0, damping parameter $(100.0*dt)
print "damping coefficient is $(100.0*dt)"

# equilibration run
thermo 100
run 50000
reset_timestep 0

# save mean squared displacement data (optional)
if "${output_msd} == 1" then &
    "compute MSD all msd" &
    "fix msd_avg all ave/time 10 1 10 c_MSD[4] file ${output_msd_file} mode scalar"

# save amine positions for bond analysis (optional)
if "${output_amine} == 1" then &
    "dump aminepos amine custom 10 ${output_amine_file} id type x y z"

# save trajectory of all particles (optional)
if "${output_traj} == 1" then &
    "dump traj all atom 10 ${output_traj_file}"

# experiment run
timestep 0.001
thermo_style custom step temp epair emol etotal press pxy
thermo 100
run 200000

print "Ending in.amine_polymers"
